# OpenSim document version 40000
InverseKinematicsTool:
  results_directory: ./
  constraint_weight: Inf
  accuracy: 1e-7
  time_range: 0 9.995
  report_errors: true
  report_marker_locations: false
  IKTaskSet:
    IKMarkerTask LFHD: apply=true weight=1
    IKMarkerTask LBHD: apply=true weight=1
    IKMarkerTask RFHD: apply=true weight=1
    IKMarkerTask RBHD: apply=true weight=1
    IKMarkerTask RSHO: apply=true weight=1
    IKMarkerTask LSHO: apply=true weight=1
    IKMarkerTask C7: apply=true weight=10
    IKMarkerTask CLAV: apply=true weight=10
    IKMarkerTask RUPA: apply=true weight=1
    IKMarkerTask RELB: apply=true weight=1
    IKMarkerTask RFRA: apply=true weight=1
    IKMarkerTask RWRA: apply=true weight=1
    IKMarkerTask RWRB: apply=true weight=1
    IKMarkerTask LUPA: apply=true weight=1
    IKMarkerTask LELB: apply=true weight=1
    IKMarkerTask LFRA: apply=true weight=1
    IKMarkerTask LWRA: apply=true weight=1
    IKMarkerTask LWRB: apply=true weight=1
    IKMarkerTask RASI: apply=true weight=100
    IKMarkerTask LASI: apply=true weight=100
    IKMarkerTask RPSI: apply=true weight=100
    IKMarkerTask LPSI: apply=true weight=100
    IKMarkerTask RTHIP: apply=true weight=1
    IKMarkerTask RTHI: apply=true weight=1
    IKMarkerTask RTHID: apply=true weight=1
    IKMarkerTask RKNE: apply=true weight=10
    IKMarkerTask RTIBP: apply=true weight=1
    IKMarkerTask RTIB: apply=true weight=1
    IKMarkerTask RTIBD: apply=true weight=1
    IKMarkerTask RANK: apply=true weight=10
    IKMarkerTask RHEE: apply=true weight=1
    IKMarkerTask RTOE: apply=true weight=5
    IKMarkerTask RTOEL: apply=true weight=5
    IKMarkerTask LTHIP: apply=true weight=1
    IKMarkerTask LTHI: apply=true weight=1
    IKMarkerTask LTHID: apply=true weight=1
    IKMarkerTask LKNE: apply=true weight=10
    IKMarkerTask LTIBP: apply=true weight=1
    IKMarkerTask LTIB: apply=true weight=1
    IKMarkerTask LTIBD: apply=true weight=1
    IKMarkerTask LANK: apply=true weight=10
    IKMarkerTask LHEE: apply=true weight=1
    IKMarkerTask LTOE: apply=true weight=5
    IKMarkerTask LTOEL: apply=true weight=5
