# OpenSim document version 40000
ScaleTool CoBaL_Walker:
  mass: 75.337 [kg]
  height: -1
  age: -1
  ModelScaler:
    apply: true
    scaling_order: measurements
    marker_file: marker/20200203_OLR26_static_001_marker.trc
    time_range: 0 0.05
    preserve_mass_distribution: false
    MeasurementSet gait2354:
      Measurement torso: apply=true
        MarkerPair: markers=(RASI CLAV)
        MarkerPair: markers=(LASI CLAV)
        MarkerPair: markers=(RPSI C7)
        MarkerPair: markers=(LPSI C7)
        MarkerPair: markers=(RASI RSHO)
        MarkerPair: markers=(LASI LSHO)
        BodyScale torso: axes=(X Y Z)
        BodyScale head: axes=(X Y Z)
      Measurement pelvis: apply=true
        MarkerPair: markers=(RASI LASI)
        BodyScale pelvis: axes=(X Y Z)
      Measurement thigh: apply=true
        MarkerPair: markers=(RASI RKNE)
        MarkerPair: markers=(LASI LKNE)
        BodyScale femur_r: axes=(X Y Z)
        BodyScale femur_l: axes=(X Y Z)
      Measurement shank: apply=true
        MarkerPair: markers=(RKNE RANK)
        MarkerPair: markers=(LKNE LANK)
        MarkerPair: markers=(RKNEM RANKM)
        MarkerPair: markers=(LKNEM LANKM)
        BodyScale tibia_r: axes=(X Y Z)
        BodyScale patella_r: axes=(X Y Z)
        BodyScale tibia_l: axes=(X Y Z)
        BodyScale patella_l: axes=(X Y Z)
      Measurement foot: apply=true
        MarkerPair: markers=(RHEE RTOEL)
        MarkerPair: markers=(LHEE LTOEL)
        BodyScale talus_r: axes=(X Y Z)
        BodyScale calcn_r: axes=(X Y Z)
        BodyScale toes_r: axes=(X Y Z)
        BodyScale talus_l: axes=(X Y Z)
        BodyScale calcn_l: axes=(X Y Z)
        BodyScale toes_l: axes=(X Y Z)
      Measurement upperarm: apply=true
        MarkerPair: markers=(RSHO RELB)
        MarkerPair: markers=(LSHO LELB)
        BodyScale humerus_r: axes=(X Y Z)
        BodyScale humerus_l: axes=(X Y Z)
      Measurement forearm: apply=true
        MarkerPair: markers=(RELB RWRA)
        MarkerPair: markers=(RELB RWRB)
        MarkerPair: markers=(LELB LWRA)
        MarkerPair: markers=(LELB LWRB)
        BodyScale ulna_r: axes=(X Y Z)
        BodyScale radius_r: axes=(X Y Z)
        BodyScale hand_r: axes=(X Y Z)
        BodyScale ulna_l: axes=(X Y Z)
        BodyScale radius_l: axes=(X Y Z)
        BodyScale hand_l: axes=(X Y Z)
  MarkerPlacer:
    apply: true
    time_range: 0 0.005
    max_marker_movement: -1
    IKTaskSet:
      IKMarkerTask LFHD: apply=false weight=1
      IKMarkerTask LBHD: apply=false weight=1
      IKMarkerTask RFHD: apply=false weight=1
      IKMarkerTask RBHD: apply=false weight=1
      IKMarkerTask RSHO: apply=true weight=1000
      IKMarkerTask LSHO: apply=true weight=1000
      IKMarkerTask C7: apply=true weight=1000
      IKMarkerTask CLAV: apply=true weight=1000
      IKMarkerTask RUPA: apply=true weight=1
      IKMarkerTask RELB: apply=true weight=100
      IKMarkerTask RFRA: apply=true weight=1
      IKMarkerTask RWRA: apply=true weight=100
      IKMarkerTask RWRB: apply=true weight=100
      IKMarkerTask LUPA: apply=true weight=1
      IKMarkerTask LELB: apply=true weight=100
      IKMarkerTask LFRA: apply=true weight=1
      IKMarkerTask LWRA: apply=true weight=100
      IKMarkerTask LWRB: apply=true weight=100
      IKMarkerTask RASI: apply=true weight=1000
      IKMarkerTask LASI: apply=true weight=1000
      IKMarkerTask RPSI: apply=true weight=1000
      IKMarkerTask LPSI: apply=true weight=1000
      IKMarkerTask RKNE: apply=true weight=100
      IKMarkerTask RKNEM: apply=true weight=100
      IKMarkerTask RANK: apply=true weight=100
      IKMarkerTask RANKM: apply=true weight=100
      IKMarkerTask RHEE: apply=true weight=10
      IKMarkerTask RTOE: apply=true weight=10
      IKMarkerTask RTOEL: apply=true weight=1
      IKMarkerTask LKNE: apply=true weight=100
      IKMarkerTask LKNEM: apply=true weight=100
      IKMarkerTask LANK: apply=true weight=100
      IKMarkerTask LANKM: apply=true weight=100
      IKMarkerTask LHEE: apply=true weight=10
      IKMarkerTask LTOE: apply=true weight=10
      IKMarkerTask LTOEL: apply=true weight=1
      IKCoordinateTask [values shared by the 6 below unless stated]: apply=true weight=1000 value_type=default_value
      IKCoordinateTask pelvis_list: value=0
      IKCoordinateTask subtalar_angle_r: value=0
      IKCoordinateTask subtalar_angle_l: value=0
      IKCoordinateTask neck_pitch: value=1000
      IKCoordinateTask neck_roll: weight=0 value=1000
      IKCoordinateTask neck_yaw: value=0
